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/batch
! ANSYS input file written by Workbench version 16.1 RELEASE
! File used for geometry attach: P:\Topology optimization\assignment1_files\dp0\SYS\DM\SYS.agdb
/title,assignment1--Static Structural (C5)
/com,--- Data in consistent MKS units. See Solving Units in the help system for more information.
/units,MKS
/prep7
! Turn off shape checking because checks already performed inside WB mesher.
! See help system for more information.
SHPP,OFF,,NOWARN
etcon,set             ! allow ANSYS to choose best KEYOP's for 180x elements
/com,*********** Nodes for the whole assembly ***********
nblock,3
(1i9,3e20.9e3)
        1    0.000000000E+000    6.000000000E+000    0.000000000E+000
        2    0.000000000E+000    0.000000000E+000    0.000000000E+000
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-1
/com,*********** Elements for Body 1 "Surface Body" ***********
et,1,183
keyo,1,3,3
eblock,19,solid,,7034
(19i9)
        1        1        1        1        0        0        0        0        8        0        1     1076      928     1166     1165     9182     9183     9686     9496
        1        1        1        1        0        0        0        0        8        0        2     1074      928     1076     1075     9181     9182     9493     9491
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-1
/com,*********** Send User Defined Coordinate System(s) ***********
csys,0
toffst,273.15,  ! Temperature offset from absolute zero
/com,*********** Set Reference Temperature ***********
tref,22.
/com,*********** Send Materials ***********
MP,DENS,1,7850,	! kg m^-3
MP,ALPX,1,1.2e-05,	! C^-1
MP,C,1,434,	! J kg^-1 C^-1
MP,KXX,1,60.5,	! W m^-1 C^-1
MP,RSVX,1,1.7e-07,	! kg m^3 A^-2 s^-3
MP,EX,1,100000000,	! Pa
MP,NUXY,1,0.3,
MP,MURX,1,10000,

/com,*********** Send Sheet Properties ***********
r,1,1.
!************************* Model Summary ********************
!Surface Body,	Structural Steel,	matid,	1
!************************* End Model Summary ********************
/com,*********** Fixed Supports ***********
CMBLOCK,_FIXEDSU,NODE,        1
(8i10)
         2
cmsel,s,_FIXEDSU
d,all,all
nsel,all
/com,******* Constant Zero Displacement Y *******
CMBLOCK,_DISPZEROUY,NODE,        1
(8i10)
        62
cmsel,s,_DISPZEROUY
d,all,uy,0
nsel,all
nsel,all
/com,*********** Define Vertex Force Using Follower Elements ***********
et,2,201
keyo,2,1,1           ! Keep the direction constant
keyo,2,2,1           ! Apply Forces only, not moment
mat,2
real,2
type,2
en,7035,179
r,2
rmod,2,1,1.0,              ! FX
mat,3
real,3
type,2
en,7036,179
r,3
rmod,3,2,1.0,              ! FY

*DIM,_loadvari119x,TABLE,2,1,1,TIME,
! Time values
_loadvari119x(1,0,1) = 0.
_loadvari119x(2,0,1) = 1.
! Load values
_loadvari119x(1,1,1) = 0.
_loadvari119x(2,1,1) = 4.44089223084952e-015


*DIM,_loadvari119y,TABLE,2,1,1,TIME,
! Time values
_loadvari119y(1,0,1) = 0.
_loadvari119y(2,0,1) = 1.
! Load values
_loadvari119y(1,1,1) = -0.
_loadvari119y(2,1,1) = -15.

fini
/com,****************************************************************************
/com,*************************    SOLUTION       ********************************
/com,****************************************************************************
/solu
antype,0                   ! static analysis
eqsl,sparse,,,,,1
cntr,print,1               ! print out contact info and also make no initial contact an error
nldiag,cont,iter           ! print out contact info each equilibrium iteration
resc,,none                 ! Do not keep any restart files
/com,****************************************************
/com,******************* SOLVE FOR LS 1 ****************
esel,s,real,,2
sfe,all,1,pres,1,%_loadvari119x%
esel,s,real,,3
sfe,all,1,pres,1,%_loadvari119y%
esel,all
nsub,1,1,1
time,1.
outres,erase
outres,all,none
outres,nsol,all
outres,rsol,all
outres,strs,all
outres,epel,all
outres,eppl,all
stabilize,off                   ! Stabilization turned OFF by user
! *********** WB SOLVE COMMAND ***********
! check interactive state
*get,ANSINTER_,active,,int
*if,ANSINTER_,ne,0,then
/eof
*endif
solve
/com *************** Write FE CONNECTORS *********
CEWRITE,file,ce,,INTE
/com,****************************************************
/com,*************** FINISHED SOLVE FOR LS 1 *************
*set,_DS_PROGRESS          ! turn off progress updates to avoid virus scanning bug
/post1
fini
